# Рекомендации:
# - Следует изменять содержимое только тех блоков, которые выделены желтым цветом!
# - Зеленым выделены блоки, значения в которых требуют контроля.
# Подключение библиотеки
# [reference: rfp2mcd(c) Release [mcd14].xmcd]
# Указание абсолютного пути к файлу свойств смеси:
hfld := "C:\Rfp8\mixtures\R404A.MIX"
# Рекомендации:
# - В конце строки вертикальный сплеш - "|" не указывается!
# Точка отсчета энтальпии и энтропии:
hrf := "IIR"
# Инициализация библиотеки
init_result := init_SETMIX(hfld, hfm, hrf)
# Число компонентов
ncc := init_result[ORIGIN] = 3
# Компоненты заданной смеси
ncc
name_i(1) = "R125"
init_result = [3; 0.357817; 0.038264; 0.603919]
name_i(2) = "R134a"
name_i(3) = "R143a"
# Вектор-столбец концентрации, заданный в функциях файла библиотеки
x :=
    for j ∈ ORIGIN .. ORIGIN + ncc - 1
        Ans[j] ← init_result[j + 1]
    Ans
name_i(1) = "R125"
x_tst := x = [0.357817; 0.038264; 0.603919]
name_i(2) = "R134a"
name_i(3) = "R143a"
# Рекомендации:
# - При изменении любого параметры в блоке задания компонентов смеси следует выполнить полный перерасчет документа - Ctrl+F9!
# - Чтобы снизить вероятность "вылета" MathCad, периодически выполняйте полный перерасчет документа (Ctrl+F9) перед сохранением.
# - После того, как настройка рабочего вещества будет закончена, область, в которой находится этот блок, можно скрыть. Она не будет выведен на печать.
# - Вы можете использовать размерности СИ без их переопределения, поскольку это уже сделано в файле библиотеки.
# Нормальная температура кипения смеси:
T_s_px(1*атм, x_tst) = -46.2218 °C
