# Рекомендации:
# - Следует изменять содержимое только тех блоков, которые выделены желтым цветом!
# - Зеленым выделены блоки, значения в которых требуют контроля.
# Подключение библиотеки
# [reference: rfp2mcd(c) Release [mcd14].xmcd]
# Указание абсолютного пути к файлам свойств компонентов смеси:
hfld1 := "C:\Rfp8\fluids\HELIUM.FLD|"
hfld2 := "C:\Rfp8\fluids\ARGON.FLD|"
hfld3 := "C:\Rfp8\fluids\METHANE.FLD|"
# Рекомендации:
# - Можно задать любое количество компонентов смеси, но следует помнить, что не все пары указанных компонентов могут иметь коэффициенты бинарного взаимодействия в файле HMX.BNC в папке fluids.
# - В конце строки каждого пути должен быть вертикальный сплеш - "|".
# Объединение путей компонентов
hfld := concat(hfld1, hfld2, hfld3)
# Число компонентов
i := 3
# Инициализация библиотеки
ierr_SETUP(i, hfld, hfm, hrf) = 0
# Вектор-столбец концентрации
hfld1 = "C:\Rfp8\fluids\HELIUM.FLD|"
x := [0.1; 0.5; 0.4]
hfld2 = "C:\Rfp8\fluids\ARGON.FLD|"
hfld3 = "C:\Rfp8\fluids\METHANE.FLD|"
# Вектор-столбец концентрации, заданный в функциях файла библиотеки
# Смесь | Чистый He | Чистый Ar | Чистый CH4
x_tst := x
x_He := [1; 0; 0]
x_Ar := [0; 1; 0]
x_CH4 := [0; 1; 0]
# Рекомендации:
# - При изменении любого параметры в блоке задания компонентов смеси следует выполнить полный перерасчет документа - Ctrl+F9!
# - Чтобы снизить вероятность "вылета" MathCad, периодически выполняйте полный перерасчет документа (Ctrl+F9) перед сохранением.
# - После того, как настройка рабочего вещества будет закончена, область, в которой находится этот блок, можно скрыть. Она не будет выведен на печать.
# - Вы можете использовать размерности СИ без их переопределения, поскольку это уже сделано в файле библиотеки.
# Нормальная температура кипения смеси:
T_s_px(1*атм, x_tst) = 16.9816 K
# Нормальная температура кипения гелия:
T_s_px(1*атм, x_He) = 4.22208 K
