# Рекомендации:
# - Следует изменять содержимое только тех блоков, которые выделены желтым цветом!
# - Зеленым выделены блоки, значения в которых требует контроля.
# Подключение библиотеки
# [reference: rfp2mcd(c) Release [mcd14].xmcd]
# Указание абсолютного пути к файлу свойств рабочего вещества
hfld := "C:\Rfp8\fluids\NITROGEN.FLD"
# Число компонентов
i := 1
# Инициализация библиотеки
ierr_SETUP(i, hfld, hfm, hrf) = 0
# Вектор-столбец концентрации
x := [1]
# Вектор-столбец концентраций, заданный в функциях файла библиотеки
x_tst := x
# Рекомендации:
# - При изменении любого параметры в блоке задания рабочего вещества следует выполнить полный перерасчет документа - Ctrl+F9!
# - Чтобы снизить вероятность "вылета" MathCad, периодически выполняйте полный перерасчет документа (Ctrl+F9) перед сохранением.
# - После того, как настройка рабочего вещества будет закончена, область, в которой находится этот блок, можно скрыть. Она не будет выведен на печать.
# - Вы можете использовать размерности СИ без их переопределения, поскольку это уже сделано в файле библиотеки.
# Нормальная температура кипения:
T_s_px(1*атм, x_tst) = 4.22208 K
