# Рекомендации:
# Чтобы не вставлять все содержимое этого файла в ручном режиме, можно использовать вставку по ссылке. Для этого:
# 1. Скопировать блок Задаваемые параметры в рабочий файл выше блока ссылки, удалить блок Задаваемые параметры из этого файла, если требуется дополнительная настройка графика;
# 2. Сохранить этот файл без блока Задаваемые параметры;
# 3. В файле, где требуется построение диаграммы, выбрать пункт Вставка на панели инструментов, в контекстном меню выбрать Ссылка...;
# 4. Выбрать этот файл в проводнике, заведомо разместив его в удобном для импорта месте, например, в папку с рабочим файлом;
# 5. Скопировать шаблон графика из этого файла в рабочий файл ниже блока со ссылкой;
# 6. Выполнить полный перерасчет документа (Ctrl + F9);
# [area: Построение lg(p)-h диаграммы (Не копируется)]
# Границы графика по оси давления
# Верхняя граница давления (критическая точка)
p_ph_max := p_c_i(1) = бар
# Нижняя граница давления (задана пользователем или 1 бар)
p_ph_min.(p_min) :=
    if p_min == 0
        if (rows(p_cycle) > 1)
            p ← Trunc(min(p_cycle/бар) - 0.5, 1)
            return p*бар if p > 0
            return min(p_cycle/бар)*бар
        return (1*бар)
    return p_min
p_ph_min := p_ph_min.(p_min) = бар
# Нижняя граница графика (задана пользователем, 1 бар или рассчитана автоматически по циклу)
p_ph_p_min.(p_plot_b) :=
    if p_plot_b == 0
        if (rows(p_cycle) > 1)
            p ← Trunc(min(p_cycle/бар) - 0.5, 1)
            return p*бар if p > 0
            return min(p_cycle/бар)*бар
        return (1*бар)
    return p_plot_b
p_ph_p_min := p_ph_p_min.(p_plot_b) = бар
# Верхняя граница графика (задана пользователем, p_ph_max или рассчитана автоматически по циклу)
p_ph_p_max.(p_plot_t) :=
    if p_plot_t == 0
        if (rows(p_cycle) > 1)
            p ← Trunc(max(p_cycle/бар) + 6, 5)
            return p*бар
        return p_ph_max
    return p_plot_t
p_ph_p_max := p_ph_p_max.(p_plot_t) = бар
# Границы графика по оси энтальпий
# Левая граница графика (задана пользователем, энтальпия насыщенной жидкости при 1бар или рассчитана автоматически по циклу)
h_ph_p_min.(h_plot_l) :=
    if h_plot_l == 0
        if (rows(h_cycle) > 1)
            h ← Trunc(min(h_cycle/(кДж/кг)) - 5, 5)*кДж/кг
            return h
        h_0 ← h_Tdx(T_s_px(1*бар, x_tst), ρ_s_px(1*бар, x_tst), x_tst)
        h ← Trunc(h_0/(кДж/кг) - 5, 5)*кДж/кг
        return h
    return h_plot_l
h_ph_p_min := h_ph_p_min.(h_plot_l) = кДж/кг
# Правая граница графика (задана пользователем, энтальпия насыщенного пара при 1бар или рассчитана автоматически по циклу)
h_ph_p_max.(h_plot_r) :=
    if h_plot_r == 0
        if (rows(h_cycle) > 1)
            h ← Trunc(max(h_cycle/(кДж/кг)) + 10, 5)*кДж/кг
            return h
        h_0 ← h_Tdx(T_s_py(1*бар, x_tst), ρ_s_py(1*бар, x_tst), x_tst)
        h ← Trunc(h_0/(кДж/кг) + 15, 5)*кДж/кг
        return h
    return h_plot_r
h_ph_p_max := h_ph_p_max.(h_plot_r) = кДж/кг
# Основной функционал
# Диапазон изменения давления
p_ph := p_ph_min, p_ph_min + (p_ph_max - p_ph_min)/N .. p_ph_max
# Левая ветвь парожидкостной кривой (насыщенная жидкость)
h_ph_ж(p) := h_Tdx(T_s_px(p, x_tst), ρ_s_px(p, x_tst), x_tst)
# Правая ветвь парожидкостной кривой (насыщенный пар
h_ph_п(p) := h_Tdx(T_s_py(p, x_tst), ρ_s_py(p, x_tst), x_tst)
# Вспомогательные переменные для снятия размерностей (необходимо домножать все функции и векторы, добавляемые в график на эти переменные):
hh := кг/кДж
pp := 1/бар
# Изопроцессы
# Изоэнтропа
ph_Sconst(S, p) := h_psz(p, S, x_tst)
# Изотерма
ph_Tconst(T, p) := h_Tpz(T, p, x_tst)
# Пример изотермы
T_80(p) := ph_Tconst(110*K, p)*hh
# Пример изоэнтропы
S_5(p) := ph_Sconst(4*кДж/(кг*K), p)*hh
# Пример графика для вставки
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