# Рекомендации:
# - Следует изменять содержимое только тех блоков, которые выделены желтым цветом!
# - Зеленым выделены блоки, значения в которых требует контроля.
# Подключение библиотеки
# [reference: rfp2mcd(c) Release [mcd14].xmcd]
# Указание абсолютного пути к файлу свойств рабочего вещества
hfld := "C:\Rfp8\fluids\NITROGEN.FLD"
# Число компонентов
i := 1
# Инициализация библиотеки
ierr_SETUP(i, hfld, hfm, hrf) = 0
# Вектор-столбец концентрации
x := [1]
# Вектор-столбец концентраций, заданный в функциях файла библиотеки
x_tst := x
# Рекомендации:
# - При изменении любого параметры в блоке задания рабочего вещества следует выполнить полный перерасчет документа - Ctrl+F9!
# - Чтобы снизить вероятность "вылета" MathCad, периодически выполняйте полный перерасчет документа (Ctrl+F9) перед сохранением.
# - После того, как настройка рабочего вещества будет закончена, область, в которой находится этот блок, можно скрыть. Она не будет выведен на печать.
# - Вы можете использовать размерности СИ без их переопределения, поскольку это уже сделано в файле библиотеки.
# [area: Задаваемые параметры]
# Задаваемые параметры
# Рекомендации:
# - Следует изменять содержимое только тех блоков, которые выделены зеленым цветом!
# - Желтым выделены блоки, значения в которых требует контроля.
# Массив давлений:
p_cycle := stack(0*бар)
# Массив энтальпий:
h_cycle := stack(0*кДж/кг)
# Нижняя граница давления:
p_min := 0*бар
# Число точек для построения:
N := 100
# Нижняя граница графика:
p_plot_b := 0*бар
# Верхняя граница графика:
p_plot_t := 0*бар
# Левая граница графика:
h_plot_l := 0*кДж/кг
# Правая граница графика:
h_plot_r := 0*кДж/кг
# Примечание:
# - Если в переменной p_min установелено давление, отличное от 0бар, то оно будет установлено для диаграммы.  Если задан цикл, а давление не задано, то будет установлено наиболее подходящее значение;
# - Введите давления и энтальпии через запятую в массивы p_cycle и h_cycle, можно вводить переменные, но они должны иметь соответствующую размерность;
# - Если требуется построить диаграмму без цикла, оставьте параметры в массивах p_cycle и h_cycle без изменения [stack(1*бар) иstack(1*кДж/кг)];
# - Если в переменных p_plot_b  и p_plot_t установелено давление, отличное от 0бар, то оно будет установлено для границ графика. Если задан цикл, а давления не заданы, то будут установлены наиболее подходящие значения;
# - Если в переменных h_plot_l  и h_plot_r установелены энтальпии отличные от 0*кДж/кг, то они будут установлены для границ графика. Если задан цикл, а энтальпии не заданы, то будут установлены наиболее подходящие значения.
# Проверьте ошибки:
Error :=
    return "Число элементов не совпадает!" if rows(p_cycle) ≠ rows(h_cycle)
    return "OK"
Error = "OK"
# [area: Построение lg(p)-h диаграммы]
# Границы графика по оси давления
# Верхняя граница давления (критическая точка)
p_ph_max := p_c_i(1) = 33.958 бар
# Нижняя граница давления (задана пользователем или 1 бар)
p_ph_min.(p_min) :=
    if p_min == 0
        if (rows(p_cycle) > 1)
            p ← Trunc(min(p_cycle/бар) - 0.5, 1)
            return p*бар if p > 0
            return min(p_cycle/бар)*бар
        return (1*бар)
    return p_min
p_ph_min := p_ph_min.(p_min) = 1 бар
# Нижняя граница графика (задана пользователем, 1 бар или рассчитана автоматически по циклу)
p_ph_p_min.(p_plot_b) :=
    if p_plot_b == 0
        if (rows(p_cycle) > 1)
            p ← Trunc(min(p_cycle/бар) - 0.5, 1)
            return p*бар if p > 0
            return min(p_cycle/бар)*бар
        return (1*бар)
    return p_plot_b
p_ph_p_min := p_ph_p_min.(p_plot_b) = 1 бар
# Верхняя граница графика (задана пользователем, p_ph_max или рассчитана автоматически по циклу)
p_ph_p_max.(p_plot_t) :=
    if p_plot_t == 0
        if (rows(p_cycle) > 1)
            p ← Trunc(max(p_cycle/бар) + 6, 5)
            return p*бар
        return p_ph_max
    return p_plot_t
p_ph_p_max := p_ph_p_max.(p_plot_t) = 33.958 бар
# Границы графика по оси энтальпий
# Левая граница графика (задана пользователем, энтальпия насыщенной жидкости при 1бар или рассчитана автоматически по циклу)
h_ph_p_min.(h_plot_l) :=
    if h_plot_l == 0
        if (rows(h_cycle) > 1)
            h ← Trunc(min(h_cycle/(кДж/кг)) - 5, 5)*кДж/кг
            return h
        h_0 ← h_Tdx(T_s_px(1*бар, x_tst), ρ_s_px(1*бар, x_tst), x_tst)
        h ← Trunc(h_0/(кДж/кг) - 5, 5)*кДж/кг
        return h
    return h_plot_l
h_ph_p_min := h_ph_p_min.(h_plot_l) = -125 кДж/кг
# Правая граница графика (задана пользователем, энтальпия насыщенного пара при 1бар или рассчитана автоматически по циклу)
h_ph_p_max.(h_plot_r) :=
    if h_plot_r == 0
        if (rows(h_cycle) > 1)
            h ← Trunc(max(h_cycle/(кДж/кг)) + 10, 5)*кДж/кг
            return h
        h_0 ← h_Tdx(T_s_py(1*бар, x_tst), ρ_s_py(1*бар, x_tst), x_tst)
        h ← Trunc(h_0/(кДж/кг) + 15, 5)*кДж/кг
        return h
    return h_plot_r
h_ph_p_max := h_ph_p_max.(h_plot_r) = 90 кДж/кг
# Основной функционал
# Диапазон изменения давления
p_ph := p_ph_min, p_ph_min + (p_ph_max - p_ph_min)/N .. p_ph_max
# Левая ветвь парожидкостной кривой (насыщенная жидкость)
h_ph_ж(p) := h_Tdx(T_s_px(p, x_tst), ρ_s_px(p, x_tst), x_tst)
# Правая ветвь парожидкостной кривой (насыщенный пар
h_ph_п(p) := h_Tdx(T_s_py(p, x_tst), ρ_s_py(p, x_tst), x_tst)
# Вспомогательные переменные для снятия размерностей (необходимо домножать все функции и векторы, добавляемые в график на эти переменные):
hh := кг/кДж
pp := 1/бар
# Изопроцессы
# Изоэнтропа
ph_Sconst(S, p) := h_psz(p, S, x_tst)
# Изотерма
ph_Tconst(T, p) := h_Tpz(T, p, x_tst)
T_80(p) := ph_Tconst(110*K, p)*hh
S_5(p) := ph_Sconst(4*кДж/(кг*K), p)*hh
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