# Рекомендации:
# - Следует изменять содержимое только тех блоков, которые выделены желтым цветом!
# - Зеленым выделены блоки, значения в которых требует контроля.
# Подключение библиотеки
# [reference: rfp2mcd(c) Release [mcd14].xmcd]
# Указание абсолютного пути к файлу свойств рабочего вещества
hfld := "C:\Rfp8\fluids\NITROGEN.FLD"
# Число компонентов
i := 1
# Инициализация библиотеки
ierr_SETUP(i, hfld, hfm, hrf) = 0
# Вектор-столбец концентрации
x := [1]
# Вектор-столбец концентраций, заданный в функциях файла библиотеки
x_tst := x
# Рекомендации:
# - При изменении любого параметры в блоке задания рабочего вещества следует выполнить полный перерасчет документа - Ctrl+F9!
# - Чтобы снизить вероятность "вылета" MathCad, периодически выполняйте полный перерасчет документа (Ctrl+F9) перед сохранением.
# - После того, как настройка рабочего вещества будет закончена, область, в которой находится этот блок, можно скрыть. Она не будет выведен на печать.
# - Вы можете использовать размерности СИ без их переопределения, поскольку это уже сделано в файле библиотеки.
# [area: Задаваемые параметры (Копируется)]
# Задаваемые параметры
# Рекомендации:
# - Следует изменять содержимое только тех блоков, которые выделены зеленым цветом!
# - Желтым выделены блоки, значения в которых требует контроля.
# Массив давлений:
p_cycle := stack(0*бар)
# Массив энтальпий:
h_cycle := stack(0*кДж/кг)
# Нижняя граница давления:
p_min := 0*бар
# Число точек для построения:
N := 100
# Нижняя граница графика:
p_plot_b := 0*бар
# Верхняя граница графика:
p_plot_t := 0*бар
# Левая граница графика:
h_plot_l := -150*кДж/кг
# Правая граница графика:
h_plot_r := 100*кДж/кг
# Примечание:
# - Если в переменной p_min установелено давление, отличное от 0бар, то оно будет установлено для диаграммы.  Если задан цикл, а давление не задано, то будет установлено наиболее подходящее значение;
# - Введите давления и энтальпии через запятую в массивы p_cycle и h_cycle, можно вводить переменные, но они должны иметь соответствующую размерность;
# - Если требуется построить диаграмму без цикла, оставьте параметры в массивах p_cycle и h_cycle без изменения [stack(1*бар) иstack(1*кДж/кг)];
# - Если в переменных p_plot_b  и p_plot_t установелено давление, отличное от 0бар, то оно будет установлено для границ графика. Если задан цикл, а давления не заданы, то будут установлены наиболее подходящие значения;
# - Если в переменных h_plot_l  и h_plot_r установелены энтальпии отличные от 0*кДж/кг, то они будут установлены для границ графика. Если задан цикл, а энтальпии не заданы, то будут установлены наиболее подходящие значения.
# Проверьте ошибки:
Error :=
    return "Число элементов не совпадает!" if rows(p_cycle) ≠ rows(h_cycle)
    return "OK"
Error = "OK"
# Сюда нужно вставить ссылку (Вставка => Ссылка...) на файл модуля!
T_80(p) := ph_Tconst(110*K, p)*hh  # error: Эта переменная не определена.
S_5(p) := ph_Sconst(4*кДж/(кг*K), p)*hh  # error: Эта переменная не определена.
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