# Рекомендации:
# - Следует изменять содержимое только тех блоков, которые выделены желтым цветом!
# - Зеленым выделены блоки, значения в которых требует контроля.
# Подключение библиотеки
# [reference: rfp2mcd(c) Release [mcd14].xmcd]
# Указание абсолютного пути к файлу свойств рабочего вещества
hfld := "C:\Rfp8\fluids\NITROGEN.FLD"
# Число компонентов
i := 1
# Инициализация библиотеки
ierr_SETUP(i, hfld, hfm, hrf) = 0
# Вектор-столбец концентрации
x := [1]
# Вектор-столбец концентраций, заданный в функциях файла библиотеки
x_tst := x
# Рекомендации:
# - При изменении любого параметры в блоке задания рабочего вещества следует выполнить полный перерасчет документа - Ctrl+F9!
# - Чтобы снизить вероятность "вылета" MathCad, периодически выполняйте полный перерасчет документа (Ctrl+F9) перед сохранением.
# - После того, как настройка рабочего вещества будет закончена, область, в которой находится этот блок, можно скрыть. Она не будет выведен на печать.
# - Вы можете использовать размерности СИ без их переопределения, поскольку это уже сделано в файле библиотеки.
# [area: Задаваемые параметры]
# Задаваемые параметры
# Рекомендации:
# - Следует изменять содержимое только тех блоков, которые выделены зеленым цветом!
# - Желтым выделены блоки, значения в которых требует контроля.
# Массив температур:
T_1 := 80 K
s_1 := 5*кДж/(кг*K)
T_cycle := stack(300 K)
T_2 := 110 K
s_2 := 5*кДж/(кг*K)
# Массив энтропий:
T_3 := 110 K
s_3 := 3*кДж/(кг*K)
s_cycle := stack(0*кДж/(кг*K))
# Нижняя граница температуры:
T_4 := 80 K
s_4 := 3*кДж/(кг*K)
T_min := 0 K
# Число точек для построения:
N := 100  # Массив температур:
# Нижняя граница графика:
T_plot_b := 0 K
T_cycle := stack(T_1, T_2, T_3, T_4, T_1)  # disabled
# Верхняя граница графика:
T_plot_t := 0 K  # Массив энтропий:
# Левая граница графика:
s_plot_l := 0*кДж/(кг*K)
s_cycle := stack(s_1, s_2, s_3, s_4, s_1)  # disabled
# Правая граница графика:
s_plot_r := 0*кДж/(кг*K)
# Примечание:
# - Если в переменной T_min установелена температура, отличная от 0К (положильная), то эта температура будет установлена для диаграммы.  Если задан цикл, а температура не задана (равно 0К), то будет установлено наиболее подходящее значение;
# - Введите температуры и энтропии через запятую в массивы T_cycle и s_cycle, можно вводить переменные, но они должны иметь соответствующую размерность;
# - Если требуется построить диаграмму без цикла, оставьте параметры в массивах T_cycle и s_cycle без изменения [stack(300 K) иstack(0*кДж/(кг*K))];
# - Если в переменных T_plot_b  и T_plot_t установелена температура, отличная от 0K, то она будет установлена для границ графика. Если задан цикл, а температуры не заданы, то будут установлены наиболее подходящие значения;
# - Если в переменных s_plot_l  и s_plot_r установелены энтропии отличные от 0*кДж/(кг*K), то они будут установлены для границ графика. Если задан цикл, а энтропии не заданы, то будут установлены наиболее подходящие значения.
# Проверьте ошибки:
Error :=
    return "Число элементов не совпадает!" if rows(T_cycle) ≠ rows(s_cycle)
    return "OK"
Error = "OK"
# [area: Построение T-s диаграммы]
# Границы графика по оси температуры
# Верхняя граница температуры (критическая точка)
T_Ts_max := T_c_i(1) = 126.192 K
# Нижняя граница температуры (тройная точка)
T_Ts_min := T_tp_i(1) = 63.151 K
# Нижняя граница температуры (задана пользователем или соответствует температуре насыщенного пара при давлении 1бар)
T_Ts_min.(T_min) :=
    if T_min == 0
        if (rows(T_cycle) > 1)
            Tmin ← min(T_cycle/K)
            T_cr ← T_Ts_min/K
            T ← Trunc(Tmin - 6, 10)
            T ← Trunc(Tmin - 6, 10) if Tmin ≥ T_cr + 7
            T ← Trunc(T_cr, 10) if Tmin ≤ T_cr
            return T*K
        return Trunc(T_s_py(1*бар, x_tst)/K - 6, 10)*K
    return Trunc(T_cr, 10)*K if Tmin ≤ T_cr
    return T_min otherwise
T_Ts_min := T_Ts_min.(T_min) = 70 K
# Нижняя граница графика (задана пользователем, 1 бар или рассчитана автоматически по циклу)
T_Ts_T_min.(T_plot_b) :=
    if T_plot_b == 0
        if (rows(T_cycle) > 1)
            Tmin ← min(T_cycle/K)
            T_cr ← T_Ts_min/K
            T ← Trunc(Tmin - 6, 10)
            T ← Trunc(Tmin - 6, 10) if Tmin ≥ T_cr + 7
            T ← Trunc(T_cr, 10) if Tmin ≤ T_cr
            return T*K
        return Trunc(T_s_py(1*бар, x_tst)/K - 6, 10)*K
    return Trunc(T_cr, 10)*K if T_plot_b ≤ T_cr
    return T_plot_b otherwise
T_Ts_T_min := T_Ts_T_min.(T_plot_b) = 70 K
# Верхняя граница графика (задана пользователем, T_Ts_max или рассчитана автоматически по циклу)
T_Ts_T_max.(T_plot_t) :=
    if T_plot_t == 0
        if (rows(T_cycle) > 1)
            T ← Trunc(max(T_cycle/K) + 12, 10)
            return T*K
        return Trunc(T_Ts_max/K + 6, 10)*K
    return T_plot_t
T_Ts_T_max := T_Ts_T_max.(T_plot_t) = 130 K
# Границы графика по оси энтропии
# Левая граница графика (задана пользователем, энтропия насыщенной жидкости при 1бар или рассчитана автоматически по циклу)
s_Ts_s_min.(s_plot_l) :=
    if s_plot_l == 0
        if (rows(s_cycle) > 1)
            s ← Trunc(min(s_cycle/(кДж/(кг*K))) - 0.3, 0.25)*кДж/(кг*K)
            return s
        s_0 ← s_Tdx(T_s_px(1*бар, x_tst), ρ_s_px(1*бар, x_tst), x_tst)
        s ← Trunc(s_0/(кДж/(кг*K)) - 0.3, 0.25)*кДж/(кг*K)
        return s
    return s_plot_l
s_Ts_s_min := s_Ts_s_min.(s_plot_l) = 2.5 кДж/(кг*K)
# Правая граница графика (задана пользователем, энтропия насыщенного пара при 1бар или рассчитана автоматически по циклу)
s_Ts_s_max.(s_plot_r) :=
    if s_plot_r == 0
        if (rows(s_cycle) > 1)
            s ← Trunc(max(s_cycle/(кДж/(кг*K))) + 0.3, 0.25)*кДж/(кг*K)
            return s
        s_0 ← s_Tdx(T_s_py(1*бар, x_tst), ρ_s_py(1*бар, x_tst), x_tst)
        s ← Trunc(s_0/(кДж/(кг*K)) + 0.3, 0.25)*кДж/(кг*K)
        return s
    return s_plot_r
s_Ts_s_max := s_Ts_s_max.(s_plot_r) = 5.5 кДж/(кг*K)
# Основной функционал
# Диапазон изменения температуры
T_Ts := T_Ts_min, T_Ts_min + (T_Ts_max - T_Ts_min)/N .. T_Ts_max
# Левая ветвь парожидкостной кривой (насыщенная жидкость)
s_Ts_ж(T) := s_Tdx(T, ρ_s_Tx(T, x_tst), x_tst)
# Правая ветвь парожидкостной кривой (насыщенный пар)
s_Ts_п(T) := s_Tdx(T, ρ_s_Ty(T, x_tst), x_tst)
# Вспомогательные переменные для снятия размерностей (необходимо домножать все функции и векторы, добавляемые в график на эти переменные):
ss := кг*K/кДж
tt := 1/T
# Изопроцессы
# Изобара
Ts_Pconst(P, s) := T_psz(P, s, x_tst)
s_Ts := s_Ts_s_min, s_Ts_s_min + (s_Ts_s_max - s_Ts_s_min)/N .. s_Ts_s_max
# Изоэнтальпа
Ts_Hconst(H, s) := T_hsz(H, s, x_tst)
P_3бар(s) := Ts_Pconst(3*бар, s)*tt
H_50(s) := Ts_Hconst(50*кДж/кг, s)*tt
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